# OpenSim document version 30000
Model Boxing_Bath:
  length_units: meters
  force_units: N
  gravity: 0 -9.8066 0
  credits:
    The OpenSim Development Team (Reinbolt, J; Seth, A; Habib, A; Hamner, S) adapted from a model originally created by Kate Holzbaur (11/22/04) License: Creative Commons (CCBY 3.0). You are free to distribute, remix, tweak, and build upon this work, even commercially, as long as you credit us for the original creation. http://creativecommons.org/licenses/by/3.0/
  publications:
    Holzbaur, K.R.S., Murray, W.M., Delp, S.L. A Model of the Upper Extremity for Simulating Musculoskeletal Surgery and Analyzing Neuromuscular Control. Annals of Biomedical Engineering, vol 33, pp 829–840, 2005
  BodySet:
    Body ground: mass=0 mass_center=(0 0 0) inertia_xx=0 inertia_yy=0 inertia_zz=0
        meshes=(ground_ribs.vtp ground_spine.vtp ground_skull.vtp ground_jaw.vtp ground_r_clavicle.vtp ground_r_scapula.vtp)
    Body r_humerus: mass=1.864572 mass_center=(0 -0.180496 0) inertia_xx=0.01481 inertia_yy=0.004551
        inertia_zz=0.013193 meshes=arm_r_humerus.vtp
      CustomJoint r_shoulder: parent_body=ground location_in_parent=(-0.017545 -0.007 0.17) location=(0 0 0)
        Coordinate r_shoulder_elev: motion_type=rotational default_value=0 range=(-1.570796 3.141593) clamped=false
            locked=true
        Coordinate r_shoulder_vert: motion_type=translational default_value=0 range=(-1 1) clamped=false
        SpatialTransform: axes_held_at_zero=(rotation2 rotation3 translation1 translation3)
          TransformAxis rotation1: coordinates=r_shoulder_elev axis=(-0.05889802 0.0023 0.9982614)
              LinearFunction(coefficients=1 0)
          TransformAxis translation2: coordinates=r_shoulder_vert axis=(0 1 0) LinearFunction(coefficients=1 0)
    Body ulna_r: mass=0.7565472 mass_center=(0 -0.119101 0) inertia_xx=0.002892053 inertia_yy=0.0006163802
        inertia_zz=0.002892053 meshes=ulna_rv.vtp
      CustomJoint elbow_r: parent_body=r_humerus location_in_parent=(0.003 -0.288 -0.01) location=(0 0 0)
        Coordinate elbow_flex_r: motion_type=rotational default_value=0 range=(0 2.618) clamped=true locked=true
        SpatialTransform: axes_held_at_zero=(rotation2 rotation3 translation1 translation2 translation3)
          TransformAxis rotation1: coordinates=elbow_flex_r axis=(0.226047 0.022269 0.9738618)
              LinearFunction(coefficients=1 0)
    Body radius_r: mass=0.7565472 mass_center=(0 -0.119101 0) inertia_xx=0.002892053 inertia_yy=0.0006163802
        inertia_zz=0.002892053 meshes=radius_rv.vtp
      CustomJoint radioulnar_r: parent_body=ulna_r location_in_parent=(-0.006727 -0.01285326 0.026083) location=(0 0 0)
        Coordinate pro_sup_r: motion_type=rotational default_value=0 range=(-2.094395 3.141593) clamped=true
            locked=true
        SpatialTransform: axes_held_at_zero=(rotation2 rotation3 translation1 translation2 translation3)
          TransformAxis rotation1: coordinates=pro_sup_r axis=(0.05639803 0.9984065 0.001952)
              LinearFunction(coefficients=1 0)
    Body hand_r: mass=0.5697454 mass_center=(0 -0.0746507 0) inertia_xx=0.001014157 inertia_yy=0.0005455663
        inertia_zz=0.001014157
        meshes=(pisiform_rvs.vtp lunate_rvs.vtp scaphoid_rvs.vtp triquetrum_rvs.vtp hamate_rvs.vtp capitate_rvs.vtp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)
      WeldJoint radius_hand_r: parent_body=radius_r location_in_parent=(-0.008797 -0.2330533 0.01361) location=(0 0 0)
  ForceSet:
    CoordinateActuator r_shoulder_elev: min_control=-20 max_control=20 coordinate=r_shoulder_elev optimal_force=100
    CoordinateActuator elbow_flex_r: min_control=-20 max_control=20 coordinate=elbow_flex_r optimal_force=80
    CoordinateActuator pro_sup_r: min_control=-20 max_control=20 coordinate=pro_sup_r optimal_force=55
